*Heading
** Job name: DCB-mesh4 Model name: DCB-mesh4
** Generated by: Abaqus/CAE 6.12-2
*Preprint, echo=NO, model=NO, history=NO, contact=NO
**
** PARTS
**
*Part, name=bot
*Node
      1,         150.,          25.,   1.39999998
      2,         150.,          24.,   1.39999998
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*Element, type=SC8R
   1,   79,   80,   28,   27,   53,   54,    2,    1
   2,   80,   81,   29,   28,   54,   55,    3,    2
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*Nset, nset=_PickedSet3, internal, generate
    1,  7852,     1
*Elset, elset=_PickedSet3, internal, generate
    1,  3750,     1
*Elset, elset=_topsurf_S2, internal, generate
    1,  3750,     1
*Surface, type=ELEMENT, name=topsurf
_topsurf_S2, S2
*Orientation, name=Ori-1
          1.,           0.,           0.,           0.,           1.,           0.
3, 0.
** Region: (CompositeLayup-1-1: Generated From Layup)
*Elset, elset=CompositeLayup-1-1, generate
    1,  3750,     1
** Section: CompositeLayup-1-1
*Shell Section, elset=CompositeLayup-1-1, composite, orientation=Ori-1, stack direction=3, layup=CompositeLayup-1
1., 3, Material-1, 0., Ply-1
*End Part
**
*Part, name=fnm
*Node
      1,         50.5,          25.,  0.200000003
      2,         50.5,          25.,           0.
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*Element, type=C3D8R
   1, 1581,  245,    2,   17,  645,  220,    1,   94
   2, 1582, 1581,   17,   18,  646,  645,   94,   93
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*Nset, nset=topsurf_tie
    1,    4,    7,    8,    9,   11
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*Elset, elset=predelam, generate
 1001,  1550,     1
*Nset, nset=botsurf_tie
    2,    3,    5,    6,   10,   12
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*End Part
**
*Part, name=top
*Node
      1,         150.,          25.,   1.39999998
      2,         150.,          24.,   1.39999998
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*Element, type=SC8R
   1,   79,   80,   28,   27,   53,   54,    2,    1
   2,   80,   81,   29,   28,   54,   55,    3,    2
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*Nset, nset=_PickedSet3, internal, generate
    1,  7852,     1
*Elset, elset=_PickedSet3, internal, generate
    1,  3750,     1
*Elset, elset=_botsurf_S1, internal, generate
    1,  3750,     1
*Surface, type=ELEMENT, name=botsurf
_botsurf_S1, S1
*Orientation, name=Ori-1
          1.,           0.,           0.,           0.,           1.,           0.
3, 0.
** Region: (CompositeLayup-1-1: Generated From Layup)
*Elset, elset=CompositeLayup-1-1, generate
    1,  3750,     1
** Section: CompositeLayup-1-1
*Shell Section, elset=CompositeLayup-1-1, composite, orientation=Ori-1, stack direction=3, layup=CompositeLayup-1
1., 3, Material-1, 0., Ply-1
*End Part
**
**
** ASSEMBLY
**
*Assembly, name=Assembly
**
*Instance, name=bot-1, part=bot
*End Instance
**
*Instance, name=fnm-1, part=fnm
          0.,           0.,          1.4
*End Instance
**
*Instance, name=top-1, part=top
          0.,           0.,          1.6
*End Instance
**
*Nset, nset=load, instance=top-1, generate
 7801,  7826,     1
*Elset, elset=load, instance=top-1, generate
 3726,  3750,     1
*Nset, nset=fix, instance=bot-1, generate
 7827,  7852,     1
*Elset, elset=fix, instance=bot-1, generate
 3726,  3750,     1
*Surface, type=NODE, name=fnm-1_botsurf_tie_CNS_, internal
fnm-1.botsurf_tie, 1.
*Surface, type=NODE, name=fnm-1_topsurf_tie_CNS_, internal
fnm-1.topsurf_tie, 1.
** Constraint: Constraint-1
*Tie, name=Constraint-1, adjust=yes
fnm-1_botsurf_tie_CNS_, bot-1.topsurf
** Constraint: Constraint-2
*Tie, name=Constraint-2, adjust=yes
fnm-1_topsurf_tie_CNS_, top-1.botsurf
*End Assembly
**
** MATERIALS
**
*Material, name=Material-1
*Elastic, type=ENGINEERING CONSTANTS
139400.,10160.,10160.,   0.3,   0.3, 0.436, 4600., 4600.
 3540.,
**
** BOUNDARY CONDITIONS
**
** Name: fix-bot Type: Displacement/Rotation
*Boundary
fix, 1, 1
fix, 2, 2
fix, 3, 3
** Name: fix-top Type: Displacement/Rotation
*Boundary
load, 1, 1
load, 2, 2
** ----------------------------------------------------------------
**
** STEP: loading
**
*Step, name=loading, inc=10000
*Static
0.002, 4., 0.0001, 0.002
**
** BOUNDARY CONDITIONS
**
** Name: load Type: Velocity/Angular velocity
*Boundary, type=VELOCITY
load, 3, 3, 1.
**
** OUTPUT REQUESTS
**
*Restart, write, frequency=0
**
** FIELD OUTPUT: F-Output-1
**
*Output, field
*Node Output
RF, U
*Element Output, directions=YES
EE, S
**
** HISTORY OUTPUT: H-Output-1
**
*Output, history, variable=PRESELECT
*End Step
