*Heading
** Job name: Pnc60fcltfbcd-r1 Model name: Pnc60fcltfbcd-r1
** Generated by: Abaqus/CAE 6.12-2
*Preprint, echo=NO, model=NO, history=NO, contact=NO
**
** PARTS
**
*Part, name=bot-part
*Node
      1,          53.,   12.6999998,   2.28600001
      2,           0.,   12.6999998,   2.28600001
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*Element, type=C3D8R
   1, 1881,  296,    1,   57, 3033,  249,    4,  152
   2, 1882, 1881,   57,   58, 3034, 3033,  152,  151
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*Nset, nset=_PickedSet179, internal, generate
     1,  15704,      1
*Elset, elset=_PickedSet179, internal, generate
     1,  11250,      1
*Elset, elset=_topsurf_S2, internal
     1,     2,     3,     4,     5,     6
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*Surface, type=ELEMENT, name=topsurf
_topsurf_S2, S2
*Orientation, name=Ori-3
          1.,           0.,           0.,           0.,           1.,           0.
3, 0.
** Region: (clt3-1: Generated From Layup)
*Elset, elset=clt3-1
     1,     2,     3,     4,     5,     6
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** Section: clt3-1
*Solid Section, elset=clt3-1, composite, orientation=Ori-3, stack direction=3, layup=clt3
0.111111, 1, Material-1, 30., Ply-19
0.111111, 1, Material-1, 60., Ply-20
0.111111, 1, Material-1, 60., Ply-21
0.111111, 1, Material-1, 60., Ply-22
0.111111, 1, Material-1, 60., Ply-23
0.111111, 1, Material-1, -60., Ply-24
0.111111, 1, Material-1, -60., Ply-25
0.111111, 1, Material-1, -60., Ply-26
0.111111, 1, Material-1, -60., Ply-27
*Orientation, name=Ori-2
          1.,           0.,           0.,           0.,           1.,           0.
3, 0.
** Region: (clt2-1: Generated From Layup)
*Elset, elset=clt2-1
  1226,  1227,  1228,  1229,  1230,  1231
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** Section: clt2-1
*Solid Section, elset=clt2-1, composite, orientation=Ori-2, stack direction=3, layup=clt2
0.111111, 1, Material-1, -30., Ply-10
0.111111, 1, Material-1, -60., Ply-11
0.111111, 1, Material-1, -30., Ply-12
0.111111, 1, Material-1, 90., Ply-13
0.111111, 1, Material-1, -30., Ply-14
0.111111, 1, Material-1, 30., Ply-15
0.111111, 1, Material-1, 90., Ply-16
0.111111, 1, Material-1, 30., Ply-17
0.111111, 1, Material-1, 60., Ply-18
*Orientation, name=Ori-1
          1.,           0.,           0.,           0.,           1.,           0.
3, 0.
** Region: (clt1-1: Generated From Layup)
*Elset, elset=clt1-1
 3751, 3752, 3753, 3754, 3755, 3756
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** Section: clt1-1
*Solid Section, elset=clt1-1, composite, orientation=Ori-1, stack direction=3, layup=clt1
0.111111, 1, Material-1, 60., Ply-1
0.111111, 1, Material-1, 0., Ply-2
0.111111, 1, Material-1, 60., Ply-3
0.111111, 1, Material-1, 60., Ply-4
0.111111, 1, Material-1, 60., Ply-5
0.111111, 1, Material-1, -60., Ply-6
0.111111, 1, Material-1, -60., Ply-7
0.111111, 1, Material-1, -60., Ply-8
0.111111, 1, Material-1, -60., Ply-9
*End Part
**
*Part, name=clamp-bl
*Node
      1,           0.,           0.,           5.
      2,           0.,   12.6999998,           5.
      3,           0.,   12.6999998,           0.
      4,           0.,           0.,           0.
      5,   12.6999998,   12.6999998,           5.
      6,   12.6999998,   12.6999998,           0.
      7,   12.6999998,           0.,           5.
      8,   12.6999998,           0.,           0.
*Element, type=R3D4
1, 1, 2, 3, 4
2, 2, 5, 6, 3
3, 5, 7, 8, 6
4, 7, 1, 4, 8
5, 2, 1, 7, 5
6, 8, 4, 3, 6
*Node
      9,           0.,           0.,           5.
*Nset, nset=clamp-bl-RefPt_, internal
9,
*Elset, elset=_topsurf_SPOS, internal
 5,
*Surface, type=ELEMENT, name=topsurf
_topsurf_SPOS, SPOS
*Elset, elset=_botsurf_SPOS, internal
 6,
*Surface, type=ELEMENT, name=botsurf
_botsurf_SPOS, SPOS
*Elset, elset=clamp-bl, generate
 1,  6,  1
*End Part
**
*Part, name=clamp-br
*Node
      1,           0.,           0.,           5.
      2,           0.,   12.6999998,           5.
      3,           0.,   12.6999998,           0.
      4,           0.,           0.,           0.
      5,   12.6999998,   12.6999998,           5.
      6,   12.6999998,   12.6999998,           0.
      7,   12.6999998,           0.,           5.
      8,   12.6999998,           0.,           0.
*Element, type=R3D4
1, 1, 2, 3, 4
2, 2, 5, 6, 3
3, 5, 7, 8, 6
4, 7, 1, 4, 8
5, 2, 1, 7, 5
6, 8, 4, 3, 6
*Node
      9,           0.,           0.,           5.
*Nset, nset=clamp-br-RefPt_, internal
9,
*Elset, elset=_topsurf_SPOS, internal
 5,
*Surface, type=ELEMENT, name=topsurf
_topsurf_SPOS, SPOS
*Elset, elset=_botsurf_SPOS, internal
 6,
*Surface, type=ELEMENT, name=botsurf
_botsurf_SPOS, SPOS
*Elset, elset=clamp-br, generate
 1,  6,  1
*End Part
**
*Part, name=clamp-tl
*Node
      1,           0.,           0.,           5.
      2,           0.,   12.6999998,           5.
      3,           0.,   12.6999998,           0.
      4,           0.,           0.,           0.
      5,   12.6999998,   12.6999998,           5.
      6,   12.6999998,   12.6999998,           0.
      7,   12.6999998,           0.,           5.
      8,   12.6999998,           0.,           0.
*Element, type=R3D4
1, 1, 2, 3, 4
2, 2, 5, 6, 3
3, 5, 7, 8, 6
4, 7, 1, 4, 8
5, 2, 1, 7, 5
6, 8, 4, 3, 6
*Node
      9,           0.,           0.,           5.
*Nset, nset=clamp-tl-RefPt_, internal
9,
*Elset, elset=_topsurf_SPOS, internal
 5,
*Surface, type=ELEMENT, name=topsurf
_topsurf_SPOS, SPOS
*Elset, elset=_botsurf_SPOS, internal
 6,
*Surface, type=ELEMENT, name=botsurf
_botsurf_SPOS, SPOS
*Elset, elset=clamp-tl, generate
 1,  6,  1
*End Part
**
*Part, name=clamp-tr
*Node
      1,           0.,           0.,           5.
      2,           0.,   12.6999998,           5.
      3,           0.,   12.6999998,           0.
      4,           0.,           0.,           0.
      5,   12.6999998,   12.6999998,           5.
      6,   12.6999998,   12.6999998,           0.
      7,   12.6999998,           0.,           5.
      8,   12.6999998,           0.,           0.
*Element, type=R3D4
1, 1, 2, 3, 4
2, 2, 5, 6, 3
3, 5, 7, 8, 6
4, 7, 1, 4, 8
5, 2, 1, 7, 5
6, 8, 4, 3, 6
*Node
      9,           0.,           0.,           5.
*Nset, nset=clamp-tr-RefPt_, internal
9,
*Elset, elset=_topsurf_SPOS, internal
 5,
*Surface, type=ELEMENT, name=topsurf
_topsurf_SPOS, SPOS
*Elset, elset=_botsurf_SPOS, internal
 6,
*Surface, type=ELEMENT, name=botsurf
_botsurf_SPOS, SPOS
*Elset, elset=clamp-tr, generate
 1,  6,  1
*End Part
**
*Part, name=fnm
*Node
      1,   114.300003,   12.6999998,  0.762000024
      2,   114.300003,   12.6999998,           0.
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*Element, type=C3D8R
  1, 1541,  209,    2,   25,  869,  184,    1,   80
  2, 1542, 1541,   25,   26,  870,  869,   80,   79
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*Elset, elset=predelam, generate
 2376,  3600,     1
*Nset, nset=topsurf_tie
    1,    4,    7,    8,    9,   11
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*Nset, nset=botsurf_tie
    2,    3,    5,    6,   10,   12
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*End Part
**
*Part, name=top-part
*Node
      1,          83.,   12.6999998,   2.03200006
      2,   114.300003,   12.6999998,   2.03200006
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*Element, type=C3D8R
  1,  184, 2233,  104,    4,  185, 1561,   49,    1
  2, 2233, 2234,  103,  104, 1561, 1562,   50,   49
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*Nset, nset=_PickedSet154, internal, generate
     1,  12792,      1
*Elset, elset=_PickedSet154, internal, generate
    1,  9150,     1
*Elset, elset=_botsurf_S1, internal
 5376, 5377, 5378, 5379, 5380, 5381
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*Surface, type=ELEMENT, name=botsurf
_botsurf_S1, S1
*Orientation, name=Ori-2
          1.,           0.,           0.,           0.,           1.,           0.
3, 0.
** Region: (clt2-1: Generated From Layup)
*Elset, elset=clt2-1
    1,    2,    3,    4,    5,    6
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** Section: clt2-1
*Solid Section, elset=clt2-1, composite, orientation=Ori-2, stack direction=3, layup=clt2
0.125, 1, Material-1, -30., Ply-9
0.125, 1, Material-1, 30., Ply-10
0.125, 1, Material-1, 90., Ply-11
0.125, 1, Material-1, 30., Ply-12
0.125, 1, Material-1, 60., Ply-13
0.125, 1, Material-1, 30., Ply-14
0.125, 1, Material-1, 60., Ply-15
0.125, 1, Material-1, 60., Ply-16
*Orientation, name=Ori-3
          1.,           0.,           0.,           0.,           1.,           0.
3, 0.
** Region: (clt3-1: Generated From Layup)
*Elset, elset=clt3-1
  876,  877,  878,  879,  880,  881
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** Section: clt3-1
*Solid Section, elset=clt3-1, composite, orientation=Ori-3, stack direction=3, layup=clt3
0.142857, 1, Material-1, 60., Ply-17
0.142857, 1, Material-1, 60., Ply-18
0.142857, 1, Material-1, 0., Ply-19
0.142857, 1, Material-1, -60., Ply-20
0.142857, 1, Material-1, -60., Ply-21
0.142857, 1, Material-1, -60., Ply-22
0.142857, 1, Material-1, -60., Ply-23
*Orientation, name=Ori-1
          1.,           0.,           0.,           0.,           1.,           0.
3, 0.
** Region: (clt1-1: Generated From Layup)
*Elset, elset=clt1-1
 5376, 5377, 5378, 5379, 5380, 5381
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** Section: clt1-1
*Solid Section, elset=clt1-1, composite, orientation=Ori-1, stack direction=3, layup=clt1
0.125, 1, Material-1, -60., Ply-1
0.125, 1, Material-1, -60., Ply-2
0.125, 1, Material-1, -60., Ply-3
0.125, 1, Material-1, -60., Ply-4
0.125, 1, Material-1, -30., Ply-5
0.125, 1, Material-1, -60., Ply-6
0.125, 1, Material-1, -30., Ply-7
0.125, 1, Material-1, 90., Ply-8
*End Part
**
**
** ASSEMBLY
**
*Assembly, name=Assembly
**
*Instance, name=bot-part-1, part=bot-part
*End Instance
**
*Instance, name=fnm-1, part=fnm
          0.,           0.,        3.429
*End Instance
**
*Instance, name=top-part-1, part=top-part
          0.,           0.,        4.191
*End Instance
**
*Instance, name=clamp-tl-1, part=clamp-tl
       -12.7,           0.,        3.429
*End Instance
**
*Instance, name=clamp-bl-1, part=clamp-bl
       -12.7,           0.,          -5.
*End Instance
**
*Instance, name=clamp-tr-1, part=clamp-tr
       114.3,           0.,        7.112
*End Instance
**
*Instance, name=clamp-br-1, part=clamp-br
       114.3,           0.,          -5.
*End Instance
**
*Nset, nset=_PickedSet54, internal, instance=clamp-tl-1
 1,
*Nset, nset=_PickedSet54, internal, instance=clamp-tr-1
 1,
*Nset, nset=_PickedSet58, internal, instance=clamp-bl-1
 9,
*Nset, nset=_PickedSet59, internal, instance=clamp-tl-1
 9,
*Nset, nset=_PickedSet60, internal, instance=clamp-br-1
 9,
*Nset, nset=_PickedSet61, internal, instance=clamp-tr-1
 9,
*Nset, nset=_PickedSet63, internal, instance=clamp-tr-1
 9,
*Nset, nset=_PickedSet64, internal, instance=clamp-tl-1
 9,
*Nset, nset=load, instance=top-part-1
  15,  18, 413, 414, 415, 416
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*Elset, elset=load, instance=top-part-1
  886,  897,  908,  919,  930,  941
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*Elset, elset=_specimen-topl_S2, internal, instance=bot-part-1, generate
 2601,  2750,     1
*Surface, type=ELEMENT, name=specimen-topl
_specimen-topl_S2, S2
*Elset, elset=_specimen-topr_S2, internal, instance=top-part-1, generate
 5226,  5375,     1
*Surface, type=ELEMENT, name=specimen-topr
_specimen-topr_S2, S2
*Elset, elset=_specimen-botl_S1, internal, instance=bot-part-1, generate
 6626,  6775,     1
*Surface, type=ELEMENT, name=specimen-botl
_specimen-botl_S1, S1
*Elset, elset=_specimen-botr_S1, internal, instance=bot-part-1, generate
 4976,  5125,     1
*Surface, type=ELEMENT, name=specimen-botr
_specimen-botr_S1, S1
*Surface, type=NODE, name=fnm-1_botsurf_tie_CNS_, internal
fnm-1.botsurf_tie, 1.
*Surface, type=NODE, name=fnm-1_topsurf_tie_CNS_, internal
fnm-1.topsurf_tie, 1.
*Rigid Body, ref node=clamp-tl-1.clamp-tl-RefPt_, elset=clamp-tl-1.clamp-tl
*Rigid Body, ref node=clamp-bl-1.clamp-bl-RefPt_, elset=clamp-bl-1.clamp-bl
*Rigid Body, ref node=clamp-tr-1.clamp-tr-RefPt_, elset=clamp-tr-1.clamp-tr
*Rigid Body, ref node=clamp-br-1.clamp-br-RefPt_, elset=clamp-br-1.clamp-br
** Constraint: Constraint-1
*Tie, name=Constraint-1, adjust=yes
fnm-1_botsurf_tie_CNS_, bot-part-1.topsurf
** Constraint: Constraint-2
*Tie, name=Constraint-2, adjust=yes
fnm-1_topsurf_tie_CNS_, top-part-1.botsurf
*End Assembly
**
** MATERIALS
**
*Material, name=Material-1
*Elastic, type=ENGINEERING CONSTANTS
161000.,11400.,11400.,  0.32,  0.32, 0.436, 5170., 5170.
 3980.,
**
** INTERACTION PROPERTIES
**
*Surface Interaction, name=clamp
1.,
*Friction, slip tolerance=0.005
 0.23,
**
** BOUNDARY CONDITIONS
**
** Name: fixleft Type: Displacement/Rotation
*Boundary
_PickedSet58, 1, 1
_PickedSet58, 2, 2
_PickedSet58, 3, 3
_PickedSet58, 4, 4
_PickedSet58, 5, 5
_PickedSet58, 6, 6
** Name: fixlefttop Type: Displacement/Rotation
*Boundary
_PickedSet59, 1, 1
_PickedSet59, 2, 2
_PickedSet59, 4, 4
_PickedSet59, 5, 5
_PickedSet59, 6, 6
** Name: fixload Type: Displacement/Rotation
*Boundary
load, 1, 1
load, 2, 2
** Name: fixright Type: Displacement/Rotation
*Boundary
_PickedSet60, 1, 1
_PickedSet60, 2, 2
_PickedSet60, 3, 3
_PickedSet60, 4, 4
_PickedSet60, 5, 5
_PickedSet60, 6, 6
** Name: fixrighttop Type: Displacement/Rotation
*Boundary
_PickedSet61, 1, 1
_PickedSet61, 2, 2
_PickedSet61, 4, 4
_PickedSet61, 5, 5
_PickedSet61, 6, 6
**
** INTERACTIONS
**
** Interaction: Clamps
*Contact
*Contact Inclusions
clamp-tl-1.botsurf , specimen-topl
clamp-tr-1.botsurf , specimen-topr
clamp-bl-1.topsurf , specimen-botl
clamp-br-1.topsurf , specimen-botr
*Contact Property Assignment
 ,  , clamp
** ----------------------------------------------------------------
**
** STEP: clamp
**
*Step, name=clamp
*Static
1., 1., 1e-05, 1.
**
** BOUNDARY CONDITIONS
**
** Name: clamp-l Type: Displacement/Rotation
*Boundary
_PickedSet64, 3, 3, -0.00317
** Name: clamp-r Type: Displacement/Rotation
*Boundary
_PickedSet63, 3, 3, -0.006575
**
** OUTPUT REQUESTS
**
*Restart, write, frequency=0
**
** FIELD OUTPUT: F-Output-1
**
*Output, field
*Node Output
RF, U
*Element Output, directions=YES
E, S
**
** HISTORY OUTPUT: H-Output-1
**
*Output, history, variable=PRESELECT
*End Step
** ----------------------------------------------------------------
**
** STEP: loading
**
*Step, name=loading, inc=10000
*Static
0.001, 3., 0.0001, 0.001
**
** BOUNDARY CONDITIONS
**
** Name: load Type: Velocity/Angular velocity
*Boundary, type=VELOCITY
load, 3, 3, 1.
**
** OUTPUT REQUESTS
**
*Restart, write, frequency=0
**
** FIELD OUTPUT: F-Output-1
**
*Output, field
*Node Output
RF, U
*Element Output, directions=YES
E, S
**
** HISTORY OUTPUT: H-Output-1
**
*Output, history, variable=PRESELECT
*End Step
