*Heading
 first model built
** Job name: Carla2013-model1 Model name: Model-1
** Generated by: Abaqus/CAE 6.12-2
*Preprint, echo=NO, model=NO, history=NO, contact=NO
**
** PARTS
**
*Part, name=bot_part
*Node
      1,   39.3935013,   39.3935013,           0.
      2,          50.,          50.,           0.
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*Element, type=C3D8R
  1,   63,  807,  781,   64,  121,  994,  968,  120
  2,  944,   34,    2,   33, 1131,  150,    4,   86
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*Nset, nset=_PickedSet11, internal, generate
    1,  7266,     1
*Elset, elset=_PickedSet11, internal, generate
    1,  3534,     1
*Elset, elset=_topsurf_S2, internal, generate
    1,  3534,     1
*Surface, type=ELEMENT, name=topsurf
_topsurf_S2, S2
*Elset, elset=_botsurf_S1, internal, generate
    1,  3534,     1
*Surface, type=ELEMENT, name=botsurf
_botsurf_S1, S1
*Orientation, name=Ori-1
0.707106781186547, 0.707106781186547,           0., -0.707106781186547, 0.707106781186547,           0.
3, 0.
** Region: (CompositeLayup-1-1: Generated From Layup)
*Elset, elset=CompositeLayup-1-1, generate
    1,  3534,     1
** Section: CompositeLayup-1-1
*Solid Section, elset=CompositeLayup-1-1, composite, orientation=Ori-1, stack direction=3, layup=CompositeLayup-1
0.0833333, 1, Material-1, 0., Ply-1
0.0833333, 1, Material-1, 45., Ply-2
0.0833333, 1, Material-1, -45., Ply-3
0.0833333, 1, Material-1, 90., Ply-4
0.0833333, 1, Material-1, 90., Ply-5
0.0833333, 1, Material-1, -45., Ply-6
0.0833333, 1, Material-1, 45., Ply-7
0.0833333, 1, Material-1, 0., Ply-8
0.0833333, 1, Material-1, 0., Ply-9
0.0833333, 1, Material-1, -45., Ply-10
0.0833333, 1, Material-1, 45., Ply-11
0.0833333, 1, Material-1, 90., Ply-12
*End Part
**
*Part, name=fnm
*Node
      1,   39.3935013,   39.3935013,           0.
      2,          50.,          50.,           0.
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*Element, type=C3D8R
  1,   63,  807,  781,   64,  121,  994,  968,  120
  2,  944,   34,    2,   33, 1131,  150,    4,   86
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*Nset, nset=_PickedSet11, internal, generate
    1,  7266,     1
*Elset, elset=_PickedSet11, internal, generate
    1,  3534,     1
*Nset, nset=topsurf_tie
    4,    5,    6,   10,   11,   12
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*Nset, nset=botsurf_tie
    1,    2,    3,    7,    8,    9
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*Elset, elset=predelam
    1,    2,    3,    4,    5,    6
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*Nset, nset=fixleft
  13,  15,  16,  17,  19,  20
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** Section: Section-1
*Solid Section, elset=_PickedSet11, material=Material-1
,
*End Part
**
*Part, name=top_part
*Node
      1,   39.3935013,   39.3935013,           0.
      2,          50.,          50.,           0.
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*Element, type=C3D8R
  1,   63,  807,  781,   64,  121,  994,  968,  120
  2,  944,   34,    2,   33, 1131,  150,    4,   86
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*Nset, nset=_PickedSet11, internal, generate
    1,  7266,     1
*Elset, elset=_PickedSet11, internal, generate
    1,  3534,     1
*Elset, elset=_topsurf_S2, internal, generate
    1,  3534,     1
*Surface, type=ELEMENT, name=topsurf
_topsurf_S2, S2
*Elset, elset=_botsurf_S1, internal, generate
    1,  3534,     1
*Surface, type=ELEMENT, name=botsurf
_botsurf_S1, S1
*Orientation, name=Ori-1
0.707106781186547, 0.707106781186547,           0., -0.707106781186547, 0.707106781186547,           0.
3, 0.
** Region: (CompositeLayup-1-1: Generated From Layup)
*Elset, elset=CompositeLayup-1-1, generate
    1,  3534,     1
** Section: CompositeLayup-1-1
*Solid Section, elset=CompositeLayup-1-1, composite, orientation=Ori-1, stack direction=3, layup=CompositeLayup-1
0.0666667, 1, Material-1, -45., Ply-1
0.0666667, 1, Material-1, 45., Ply-2
0.0666667, 1, Material-1, 0., Ply-3
0.0666667, 1, Material-1, 0., Ply-4
0.0666667, 1, Material-1, 45., Ply-5
0.0666667, 1, Material-1, -45., Ply-6
0.0666667, 1, Material-1, 90., Ply-7
0.0666667, 1, Material-1, 90., Ply-8
0.0666667, 1, Material-1, 45., Ply-9
0.0666667, 1, Material-1, -45., Ply-10
0.0666667, 1, Material-1, 0., Ply-11
0.0666667, 1, Material-1, 0., Ply-12
0.0666667, 1, Material-1, -45., Ply-13
0.0666667, 1, Material-1, 45., Ply-14
0.0666667, 1, Material-1, 90., Ply-15
*End Part
**
**
** ASSEMBLY
**
*Assembly, name=Assembly
**
*Instance, name=bot_part-1, part=bot_part
*End Instance
**
*Instance, name=fnm-1, part=fnm
          0.,           0.,          1.5
*End Instance
**
*Instance, name=top_part-1, part=top_part
          0.,           0.,        2.125
*End Instance
**
*Nset, nset=fixleft, instance=bot_part-1
  13,  15,  16,  17,  19,  20
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*Nset, nset=fixleft, instance=top_part-1
  13,  15,  16,  17,  19,  20
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*Elset, elset=fixleft, instance=bot_part-1
 1236, 1251, 1266, 1281, 1296, 1311
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*Elset, elset=fixleft, instance=top_part-1
 1236, 1251, 1266, 1281, 1296, 1311
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*Nset, nset=loadpoint, instance=top_part-1
 4,
*Surface, type=NODE, name=fnm-1_topsurf_tie_CNS_, internal
fnm-1.topsurf_tie, 1.
*Surface, type=NODE, name=fnm-1_botsurf_tie_CNS_, internal
fnm-1.botsurf_tie, 1.
** Constraint: Constraint-1
*Tie, name=Constraint-1, adjust=yes
fnm-1_topsurf_tie_CNS_, top_part-1.botsurf
** Constraint: Constraint-2
*Tie, name=Constraint-2, adjust=yes
fnm-1_botsurf_tie_CNS_, bot_part-1.topsurf
*End Assembly
**
** MATERIALS
**
*Material, name=Material-1
*Elastic, type=ENGINEERING CONSTANTS
161000.,11400.,11400.,  0.32,  0.32, 0.436, 5170., 5170.
 3980.,
**
** BOUNDARY CONDITIONS
**
** Name: fixleft Type: Symmetry/Antisymmetry/Encastre
*Boundary
fixleft, PINNED
** Name: fixleft-fnm Type: Symmetry/Antisymmetry/Encastre
*Boundary
fnm-1.fixleft, PINNED
** ----------------------------------------------------------------
**
** STEP: loading
**
*Step, name=loading, inc=10000
*Static
0.01, 8., 0.001, 0.01
**
** BOUNDARY CONDITIONS
**
** Name: load Type: Velocity/Angular velocity
*Boundary, type=VELOCITY
loadpoint, 3, 3, -1.
**
** OUTPUT REQUESTS
**
*Restart, write, frequency=0
**
** FIELD OUTPUT: F-Output-1
**
*Output, field
*Node Output
RF, U
*Element Output, directions=YES
E, S
**
** HISTORY OUTPUT: H-Output-1
**
*Output, history, variable=PRESELECT
*End Step
