*Heading
** Job name: CPfm-r1-mesh2 Model name: CPfm-r1
** Generated by: Abaqus/CAE 6.12-2
*Preprint, echo=NO, model=NO, history=NO, contact=NO
**
** PARTS
**
*Part, name=bot-part
*Node
      1,          48.,   12.6999998,   1.44000006
      2,   52.7999992,   12.6999998,   1.44000006
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*Element, type=C3D8R
 1,   7, 125, 106,   4,   8, 124,  71,   1
 2, 125, 126, 105, 106, 124, 123,  72,  71
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*Nset, nset=_PickedSet37, internal, generate
    1,  3738,     1
*Elset, elset=_PickedSet37, internal, generate
    1,  1596,     1
*Elset, elset=_topsurf_S2, internal
 178, 179, 180, 181, 182, 183
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*Surface, type=ELEMENT, name=topsurf
_topsurf_S2, S2
*Orientation, name=Ori-5
          1.,           0.,           0.,           0.,           1.,           0.
3, 0.
** Region: (CompositeLayup-5-1: Generated From Layup)
*Elset, elset=CompositeLayup-5-1
   1,   2,   3,   4,   5,   6
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** Section: CompositeLayup-5-1
*Solid Section, elset=CompositeLayup-5-1, composite, orientation=Ori-5, stack direction=3, layup=CompositeLayup-5
1., 1, Material-1, 0., Ply-11
*Orientation, name=Ori-6
          1.,           0.,           0.,           0.,           1.,           0.
3, 0.
** Region: (CompositeLayup-6-1: Generated From Layup)
*Elset, elset=CompositeLayup-6-1
 178, 179, 180, 181, 182, 183
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** Section: CompositeLayup-6-1
*Solid Section, elset=CompositeLayup-6-1, composite, orientation=Ori-6, stack direction=3, layup=CompositeLayup-6
1., 1, Material-1, 90., Ply-13
*Orientation, name=Ori-4
          1.,           0.,           0.,           0.,           1.,           0.
3, 0.
** Region: (CompositeLayup-4-1: Generated From Layup)
*Elset, elset=CompositeLayup-4-1
  533,  534,  535,  536,  537,  538
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** Section: CompositeLayup-4-1
*Solid Section, elset=CompositeLayup-4-1, composite, orientation=Ori-4, stack direction=3, layup=CompositeLayup-4
1., 1, Material-1, 90., Ply-5
*Orientation, name=Ori-3
          1.,           0.,           0.,           0.,           1.,           0.
3, 0.
** Region: (CompositeLayup-3-1: Generated From Layup)
*Elset, elset=CompositeLayup-3-1
  633,  634,  635,  636,  637,  638
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** Section: CompositeLayup-3-1
*Solid Section, elset=CompositeLayup-3-1, composite, orientation=Ori-3, stack direction=3, layup=CompositeLayup-3
1., 1, Material-1, 0., Ply-3
*Orientation, name=Ori-2
          1.,           0.,           0.,           0.,           1.,           0.
3, 0.
** Region: (CompositeLayup-2-1: Generated From Layup)
*Elset, elset=CompositeLayup-2-1
  876,  877,  878,  879,  880,  881
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** Section: CompositeLayup-2-1
*Solid Section, elset=CompositeLayup-2-1, composite, orientation=Ori-2, stack direction=3, layup=CompositeLayup-2
1., 1, Material-1, 90., Ply-2
*Orientation, name=Ori-1
          1.,           0.,           0.,           0.,           1.,           0.
3, 0.
** Region: (CompositeLayup-1-1: Generated From Layup)
*Elset, elset=CompositeLayup-1-1
 1065, 1066, 1067, 1068, 1069, 1070
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** Section: CompositeLayup-1-1
*Solid Section, elset=CompositeLayup-1-1, composite, orientation=Ori-1, stack direction=3, layup=CompositeLayup-1
1., 1, Material-1, 0., Ply-1
*End Part
**
*Part, name=fnm
*Node
      1,   52.7999992,   12.6999998,           0.
      2,   52.7999992,   12.6999998,  0.720000029
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*Element, type=C3D8R
 1,   8, 261, 180,   1,   5, 260,  21,   2
 2, 261, 262, 179, 180, 260, 259,  22,  21
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*Elset, elset=predelam, generate
 101,  189,    1
*Nset, nset=right_tie, generate
 17,  20,   1
*Nset, nset=planestrain, generate
    1,  1068,     1
*Nset, nset=topsurf_tie
    2,    3,    5,    6,   10,   12
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*Nset, nset=botsurf_tie
   1,   4,   7,   8,   9,  11
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*End Part
**
*Part, name=top-part
*Node
      1,         115.,   12.6999998,   2.51999998
      2,         115.,           0.,   2.51999998
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*Element, type=C3D8R
 1,  41, 268,   3,   4, 192, 269,   2,   1
 2,  42, 267, 268,  41, 191, 270, 269, 192
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*Nset, nset=_PickedSet36, internal, generate
    1,  1816,     1
*Elset, elset=_PickedSet36, internal, generate
   1,  678,    1
*Elset, elset=_botsurf_S1, internal
 227, 228, 229, 230, 231, 232
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*Surface, type=ELEMENT, name=botsurf
_botsurf_S1, S1
*Orientation, name=Ori-2
          1.,           0.,           0.,           0.,           1.,           0.
3, 0.
** Region: (CompositeLayup-2-1: Generated From Layup)
*Elset, elset=CompositeLayup-2-1
   1,   2,   3,   4,   5,   6
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** Section: CompositeLayup-2-1
*Solid Section, elset=CompositeLayup-2-1, composite, orientation=Ori-2, stack direction=3, layup=CompositeLayup-2
1., 1, Material-1, 90., Ply-1
*Orientation, name=Ori-3
          1.,           0.,           0.,           0.,           1.,           0.
3, 0.
** Region: (CompositeLayup-3-1: Generated From Layup)
*Elset, elset=CompositeLayup-3-1
 127, 128, 129, 130, 131, 132
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** Section: CompositeLayup-3-1
*Solid Section, elset=CompositeLayup-3-1, composite, orientation=Ori-3, stack direction=3, layup=CompositeLayup-3
1., 1, Material-1, 0., Ply-1
*Orientation, name=Ori-1
          1.,           0.,           0.,           0.,           1.,           0.
3, 0.
** Region: (CompositeLayup-1-1: Generated From Layup)
*Elset, elset=CompositeLayup-1-1
 227, 228, 229, 230, 231, 232
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** Section: CompositeLayup-1-1
*Solid Section, elset=CompositeLayup-1-1, composite, orientation=Ori-1, stack direction=3, layup=CompositeLayup-1
1., 1, Material-1, 0., Ply-1
*End Part
**
**
** ASSEMBLY
**
*Assembly, name=Assembly
**
*Instance, name=bot-part-1, part=bot-part
*End Instance
**
*Instance, name=fnm-1, part=fnm
          0.,           0.,         1.56
*End Instance
**
*Instance, name=top-part-1, part=top-part
          0.,           0.,         2.28
*End Instance
**
*Nset, nset=load, instance=top-part-1
 18, 21
*Elset, elset=load, instance=top-part-1
 207, 226
*Nset, nset=fixright, instance=bot-part-1
 13, 14, 15, 16, 27, 28, 43, 44, 45, 46, 57, 58, 59, 60
*Nset, nset=fixright, instance=top-part-1
  1,  2,  3,  4, 27, 28, 39, 40
*Elset, elset=fixright, instance=bot-part-1
  177,  432,  722,  799, 1065, 1520
*Elset, elset=fixright, instance=top-part-1
   1, 303, 602
*Nset, nset=fixleft, instance=bot-part-1
 17, 19, 21, 22, 23, 24, 37, 39, 41, 42, 63, 64, 69, 70
*Elset, elset=fixleft, instance=bot-part-1
  178,  355,  633,  976, 1142, 1431
*Nset, nset=planestrain, instance=bot-part-1, generate
    1,  3738,     1
*Nset, nset=planestrain, instance=top-part-1, generate
    1,  1816,     1
*Elset, elset=planestrain, instance=bot-part-1, generate
    1,  1596,     1
*Elset, elset=planestrain, instance=top-part-1, generate
   1,  678,    1
*Surface, type=NODE, name=fnm-1_botsurf_tie_CNS_, internal
fnm-1.botsurf_tie, 1.
*Surface, type=NODE, name=fnm-1_topsurf_tie_CNS_, internal
fnm-1.topsurf_tie, 1.
** Constraint: Constraint-1
*Tie, name=Constraint-1, adjust=yes
fnm-1_botsurf_tie_CNS_, bot-part-1.topsurf
** Constraint: Constraint-2
*Tie, name=Constraint-2, adjust=yes
fnm-1_topsurf_tie_CNS_, top-part-1.botsurf
*End Assembly
**
** MATERIALS
**
*Material, name=Material-1
*Elastic, type=ENGINEERING CONSTANTS
161000.,11400.,11400.,  0.32,  0.32, 0.436, 5170., 5170.
 3980.,
**
** BOUNDARY CONDITIONS
**
** Name: fixleft Type: Displacement/Rotation
*Boundary
fixleft, 1, 1
fixleft, 2, 2
fixleft, 3, 3
** Name: fixload Type: Displacement/Rotation
*Boundary
load, 1, 1
load, 2, 2
** Name: fixright Type: Displacement/Rotation
*Boundary
fixright, 1, 1
fixright, 2, 2
fixright, 3, 3
** Name: fixright-fnm Type: Displacement/Rotation
*Boundary
fnm-1.right_tie, 1, 1
fnm-1.right_tie, 2, 2
fnm-1.right_tie, 3, 3
** Name: planestrain Type: Displacement/Rotation
*Boundary
planestrain, 2, 2
** Name: planestrain-fnm Type: Displacement/Rotation
*Boundary
fnm-1.planestrain, 2, 2
** ----------------------------------------------------------------
**
** STEP: loading
**
*Step, name=loading, inc=10000
*Static
0.001, 3., 0.0001, 0.001
**
** BOUNDARY CONDITIONS
**
** Name: load Type: Velocity/Angular velocity
*Boundary, type=VELOCITY
load, 3, 3, 1.
**
** OUTPUT REQUESTS
**
*Restart, write, frequency=0
**
** FIELD OUTPUT: F-Output-1
**
*Output, field
*Node Output
RF, U
*Element Output, directions=YES
EE, S
**
** FIELD OUTPUT: F-Output-2
**
*Element Output, elset=bot-part-1.CompositeLayup-1-1, directions=YES
1
EE, S
**
** FIELD OUTPUT: F-Output-3
**
*Element Output, elset=top-part-1.CompositeLayup-1-1, directions=YES
1
EE, S
**
** HISTORY OUTPUT: H-Output-1
**
*Output, history, variable=PRESELECT
*End Step
