*Heading
** Job name: Pnc60clt-l Model name: Pnc60clt-l
** Generated by: Abaqus/CAE 6.12-2
*Preprint, echo=NO, model=NO, history=NO, contact=NO
**
** PARTS
**
*Part, name=bot-part
*Node
      1,   18.5499992,   12.6999998,    3.4289999
      2,   18.5499992,   12.6999998,           0.
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*Element, type=SC8R
  1, 1405,  169,    2,   21,  949,  144,    1,   58
  2, 1406, 1405,   21,   22,  950,  949,   58,   57
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*Nset, nset=_PickedSet37, internal, generate
    1,  9204,     1
*Elset, elset=_PickedSet37, internal, generate
    1,  4400,     1
*Elset, elset=_topsurf_S2, internal, generate
    1,  4400,     1
*Surface, type=ELEMENT, name=topsurf
_topsurf_S2, S2
*Orientation, name=Ori-1
          1.,           0.,           0.,           0.,           1.,           0.
3, 0.
** Region: (CompositeLayup-1-1: Generated From Layup)
*Elset, elset=CompositeLayup-1-1, generate
    1,  4400,     1
** Section: CompositeLayup-1-1
*Shell Section, elset=CompositeLayup-1-1, composite, orientation=Ori-1, stack direction=3, layup=CompositeLayup-1
0.037037, 1, Material-1, 60., Ply-1
0.037037, 1, Material-1, 0., Ply-2
0.037037, 1, Material-1, 60., Ply-3
0.037037, 1, Material-1, 60., Ply-4
0.037037, 1, Material-1, 60., Ply-5
0.037037, 1, Material-1, -60., Ply-6
0.037037, 1, Material-1, -60., Ply-7
0.037037, 1, Material-1, -60., Ply-8
0.037037, 1, Material-1, -60., Ply-9
0.037037, 1, Material-1, -30., Ply-10
0.037037, 1, Material-1, -60., Ply-11
0.037037, 1, Material-1, -30., Ply-12
0.037037, 1, Material-1, 90., Ply-13
0.037037, 1, Material-1, -30., Ply-14
0.037037, 1, Material-1, 30., Ply-15
0.037037, 1, Material-1, 90., Ply-16
0.037037, 1, Material-1, 30., Ply-17
0.037037, 1, Material-1, 60., Ply-18
0.037037, 1, Material-1, 30., Ply-19
0.037037, 1, Material-1, 60., Ply-20
0.037037, 1, Material-1, 60., Ply-21
0.037037, 1, Material-1, 60., Ply-22
0.037037, 1, Material-1, 60., Ply-23
0.037037, 1, Material-1, -60., Ply-24
0.037037, 1, Material-1, -60., Ply-25
0.037037, 1, Material-1, -60., Ply-26
0.037037, 1, Material-1, -60., Ply-27
*End Part
**
*Part, name=fnm
*Node
      1,   18.5499992,   12.6999998,  0.762000024
      2,   18.5499992,   12.6999998,           0.
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*Element, type=C3D8R
  1, 1405,  169,    2,   21,  949,  144,    1,   58
  2, 1406, 1405,   21,   22,  950,  949,   58,   57
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*Elset, elset=predelam
    1,    2,    3,    4,    5,    6
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*Nset, nset=topsurf_tie
    1,    4,    7,    8,    9,   12
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*Nset, nset=botsurf_tie
    2,    3,    5,    6,   10,   11
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*Nset, nset=right_tie
  17,  18,  19,  20, 733, 734
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*End Part
**
*Part, name=top-part
*Node
      1,   18.5499992,   12.6999998,        2.921
      2,   18.5499992,   12.6999998,           0.
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*Element, type=SC8R
  1, 1069,  121,    2,   21,  901,   96,    1,   34
  2, 1070, 1069,   21,   22,  902,  901,   34,   33
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*Nset, nset=_PickedSet36, internal, generate
    1,  8580,     1
*Elset, elset=_PickedSet36, internal, generate
    1,  4100,     1
*Elset, elset=_botsurf_S1, internal, generate
    1,  4100,     1
*Surface, type=ELEMENT, name=botsurf
_botsurf_S1, S1
*Orientation, name=Ori-1
          1.,           0.,           0.,           0.,           1.,           0.
3, 0.
** Region: (CompositeLayup-1-1: Generated From Layup)
*Elset, elset=CompositeLayup-1-1, generate
    1,  4100,     1
** Section: CompositeLayup-1-1
*Shell Section, elset=CompositeLayup-1-1, composite, orientation=Ori-1, stack direction=3, layup=CompositeLayup-1
0.0434783, 1, Material-1, -60., Ply-1
0.0434783, 1, Material-1, -60., Ply-2
0.0434783, 1, Material-1, -60., Ply-3
0.0434783, 1, Material-1, -60., Ply-4
0.0434783, 1, Material-1, -30., Ply-5
0.0434783, 1, Material-1, -60., Ply-6
0.0434783, 1, Material-1, -30., Ply-7
0.0434783, 1, Material-1, 90., Ply-8
0.0434783, 1, Material-1, -30., Ply-9
0.0434783, 1, Material-1, 30., Ply-10
0.0434783, 1, Material-1, 90., Ply-11
0.0434783, 1, Material-1, 30., Ply-12
0.0434783, 1, Material-1, 60., Ply-13
0.0434783, 1, Material-1, 30., Ply-14
0.0434783, 1, Material-1, 60., Ply-15
0.0434783, 1, Material-1, 60., Ply-16
0.0434783, 1, Material-1, 60., Ply-17
0.0434783, 1, Material-1, 60., Ply-18
0.0434783, 1, Material-1, 0., Ply-19
0.0434783, 1, Material-1, -60., Ply-20
0.0434783, 1, Material-1, -60., Ply-21
0.0434783, 1, Material-1, -60., Ply-22
0.0434783, 1, Material-1, -60., Ply-23
*End Part
**
**
** ASSEMBLY
**
*Assembly, name=Assembly
**
*Instance, name=bot-part-1, part=bot-part
*End Instance
**
*Instance, name=fnm-1, part=fnm
          0.,           0.,        3.429
*End Instance
**
*Instance, name=top-part-1, part=top-part
          0.,           0.,        4.191
*End Instance
**
*Nset, nset=fixleft, instance=bot-part-1
   3,   4,   6,   7,  97,  98
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*Elset, elset=fixleft, instance=bot-part-1, generate
  20,  500,   20
*Nset, nset=fixright, instance=bot-part-1
  17,  18,  19,  20, 733, 734
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*Nset, nset=fixright, instance=top-part-1
  17,  18,  19,  20, 685, 686
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*Elset, elset=fixright, instance=bot-part-1, generate
 3326,  3350,     1
*Elset, elset=fixright, instance=top-part-1, generate
 3026,  3050,     1
*Nset, nset=load, instance=top-part-1
  1,  8, 73, 74, 75, 76
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*Elset, elset=load, instance=top-part-1
    1,    9,   17,   25,   33,   41
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*Surface, type=NODE, name=fnm-1_botsurf_tie_CNS_, internal
fnm-1.botsurf_tie, 1.
*Surface, type=NODE, name=fnm-1_topsurf_tie_CNS_, internal
fnm-1.topsurf_tie, 1.
** Constraint: Constraint-1
*Tie, name=Constraint-1, adjust=yes
fnm-1_botsurf_tie_CNS_, bot-part-1.topsurf
** Constraint: Constraint-2
*Tie, name=Constraint-2, adjust=yes
fnm-1_topsurf_tie_CNS_, top-part-1.botsurf
** added nsets for constraint equations **
*Nset, nset=slaveleft, instance=bot-part-1
99998
*Nset, nset=slaveright, instance=bot-part-1
99999
** constraint equations for fix left and right bcds
*EQUATION
2
fixleft,  1, 1, slaveleft,  1, -1
*EQUATION
2
fixright, 1, 1, slaveright, 1, -1
*End Assembly
**
** MATERIALS
**
*Material, name=Material-1
*Elastic, type=ENGINEERING CONSTANTS
161000.,11380.,11380.,  0.32,  0.32,  0.45, 5200., 5200.
 3900.,
**
** BOUNDARY CONDITIONS
**
** Name: fixleft Type: Displacement/Rotation
*Boundary
fixleft, 2, 2
fixleft, 3, 3
** Name: fixload Type: Displacement/Rotation
*Boundary
load, 1, 1
load, 2, 2
** Name: fixright Type: Displacement/Rotation
*Boundary
fixright, 2, 2
fixright, 3, 3
** Name: fixright-fnm Type: Displacement/Rotation
*Boundary
fnm-1.right_tie, 2, 2
fnm-1.right_tie, 3, 3
** ----------------------------------------------------------------
**
** STEP: loading
**
*Step, name=loading, inc=50000
*Static
0.001, 5., 0.0001, 0.001
**
** BOUNDARY CONDITIONS
**
** Name: load Type: Velocity/Angular velocity
*Boundary, type=VELOCITY
load, 3, 3, 1.
**
** OUTPUT REQUESTS
**
*Restart, write, frequency=0
**
** FIELD OUTPUT: F-Output-1
**
*Output, field
*Node Output
RF, U
*Element Output, directions=YES
EE, S
**
** FIELD OUTPUT: F-Output-3
**
*Element Output, elset=top-part-1.CompositeLayup-1-1, directions=YES
1, 2, 3, 4, 5, 6, 7, 8, 9, 10, 11, 12, 13, 14, 15, 16
EE, S
*Element Output, elset=top-part-1.CompositeLayup-1-1, directions=YES
17, 18, 19, 20, 21, 22, 23
EE, S
**
** FIELD OUTPUT: F-Output-2
**
*Element Output, elset=bot-part-1.CompositeLayup-1-1, directions=YES
1, 2, 3, 4, 5, 6, 7, 8, 9, 10, 11, 12, 13, 14, 15, 16
EE, S
*Element Output, elset=bot-part-1.CompositeLayup-1-1, directions=YES
17, 18, 19, 20, 21, 22, 23, 24, 25, 26, 27
EE, S
**
** HISTORY OUTPUT: H-Output-1
**
*Output, history, variable=PRESELECT
*End Step
