*Heading
** Job name: test-beam Model name: test-beam
** Generated by: Abaqus/CAE 6.12-2
*Preprint, echo=NO, model=NO, history=NO, contact=NO
**
** PARTS
**
*Part, name=fnm-beam
*Node
      1,           1.,           1.,           1.
      2,           1.,           0.,           1.
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*Element, type=C3D8R
  1,   7,   8,   4,   3,   5,   6,   2,   1
  2,  11,  12,   8,   7,   9,  10,   6,   5
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*Nset, nset=left, generate
 401,  404,    1
*Nset, nset=right, generate
 1,  4,  1
*End Part
**
**
** ASSEMBLY
**
*Assembly, name=Assembly
**
*Instance, name=fnm-beam-1, part=fnm-beam
*End Instance
**
*End Assembly
**
** BOUNDARY CONDITIONS
**
** Name: BC-1 Type: Displacement/Rotation
*Boundary
fnm-beam-1.left, 1, 1
fnm-beam-1.left, 2, 2
fnm-beam-1.left, 3, 3
** ----------------------------------------------------------------
**
** STEP: load
**
*Step, name=load
*Static
1., 1., 1e-05, 1.
**
** BOUNDARY CONDITIONS
**
** Name: load Type: Displacement/Rotation
*Boundary
fnm-beam-1.right, 3, 3, -40.
**
** OUTPUT REQUESTS
**
*Restart, write, frequency=0
**
** FIELD OUTPUT: F-Output-1
**
*Output, field, variable=PRESELECT
**
** HISTORY OUTPUT: H-Output-1
**
*Output, history, variable=PRESELECT
*End Step
