*Heading
** Job name: Patch1 Model name: Patch1
** Generated by: Abaqus/CAE 6.11-1
*Preprint, echo=NO, model=NO, history=NO, contact=NO
**
** PARTS
**
*Part, name=fnm
*Node
1, 0.0, 0.0, -0.125
2, 1.0, 0.0, -0.125
3, 2.0, 0.0, -0.125
4, 3.0, 0.0, -0.125
5, 4.0, 0.0, -0.125
6, 5.0, 0.0, -0.125
7, 0.0, 1.0, -0.125
8, 1.0, 1.0, -0.125
9, 2.0, 1.0, -0.125
10, 3.0, 1.0, -0.125
11, 4.0, 1.0, -0.125
12, 5.0, 1.0, -0.125
13, 0.0, 0.0, 0.125
14, 1.0, 0.0, 0.125
15, 2.0, 0.0, 0.125
16, 3.0, 0.0, 0.125
17, 4.0, 0.0, 0.125
18, 5.0, 0.0, 0.125
19, 0.0, 1.0, 0.125
20, 1.0, 1.0, 0.125
21, 2.0, 1.0, 0.125
22, 3.0, 1.0, 0.125
23, 4.0, 1.0, 0.125
24, 5.0, 1.0, 0.125
*Element, type=C3D8
1, 1, 2, 8, 7, 13, 14, 20, 19
2, 2, 3, 9, 8, 14, 15, 21, 20
3, 3, 4, 10, 9, 15, 16, 22, 21
4, 4, 5, 11, 10, 16, 17, 23, 22
5, 5, 6, 12, 11, 17, 18, 24, 23
*Nset, nset=TOP
 13, 19
*Nset, nset=BOTTOM
 1, 7
*Nset, nset=top_tie, generate
 13, 24
*Nset, nset=bot_tie, generate
 1, 12
*Elset, elset=predelam
 1
*End Part
**
**
** ASSEMBLY
**
*Assembly, name=Assembly
**
*Instance, name=fnm-1, part=fnm
*End Instance
**
*End Assembly
**
** BOUNDARY CONDITIONS
**
** Name: Disp-BC-2 Type: Displacement/Rotation
*Boundary
fnm-1.BOTTOM, 3, 3
fnm-1.BOTTOM, 2, 2
fnm-1.BOTTOM, 1, 1
fnm-1.TOP, 2, 2
fnm-1.TOP, 1, 1
** ----------------------------------------------------------------
**
** STEP: tension
**
*Step, name=tension, inc=10000
*Static
0.001, 1.0, 1e-07, 0.001
**
** BOUNDARY CONDITIONS
**
** Name: Vel-BC-1 Type: Velocity/Angular velocity
*Boundary, type=VELOCITY
fnm-1.TOP, 3, 3, 1.
**
**
** OUTPUT REQUESTS
**
*Restart, write, frequency=0
**
** FIELD OUTPUT: F-Output-1
**
*Output, field, variable=PRESELECT
**
** HISTORY OUTPUT: H-Output-1
**
*Output, history, variable=PRESELECT
*End Step
