*Heading
** Job name: wisnomOHT-inplane1 Model name: Model-1
** Generated by: Abaqus/CAE 6.12-2
*Preprint, echo=NO, model=NO, history=NO, contact=NO
**
** PARTS
**
*Part, name=Part-1
*Node
      1,   1.50980222,  0.490564466,           0.
      2,   1.28431451,  0.933109105,           0.
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*Element, type=C3D8R
   1,  831,  612, 2255,  100, 3380, 3161, 4804, 2649
   2,    1, 2255,  612,    2, 2550, 4804, 3161, 2551
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*End Part
**
**
** ASSEMBLY
**
*Assembly, name=Assembly
**
*Instance, name=Part-1-1, part=Part-1
*End Instance
**
*Nset, nset=left, instance=Part-1-1
   50,   51,   52,   53,   54,   55
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*Nset, nset=right, instance=Part-1-1
   49,   87,   88,   89,   90,   91
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*Nset, nset=sym, instance=Part-1-1, generate
 2550,  5098,     1
*End Assembly
**
** BOUNDARY CONDITIONS
**
** Name: fix_left Type: Displacement/Rotation
*Boundary
left, 1, 1
left, 2, 2
** Name: sym Type: Displacement/Rotation
*Boundary
sym, 3, 3
** ----------------------------------------------------------------
**
** STEP: pull
**
*Step, name=pull, inc=100000
*Static
0.01, 1.1, 1e-05, 0.01
**
** BOUNDARY CONDITIONS
**
** Name: pull_right Type: Velocity/Angular velocity
*Boundary, type=VELOCITY
right, 1, 1, 1.
**
** CONTROLS
**
*Controls, reset
*Controls, parameters=time incrementation
800, 1000, , 1500, 1200, 50, , 125, , ,
*Controls, parameters=field, field=displacement
0.01, , , , 0.05, , ,
*Controls, parameters=field, field=hydrostatic fluid pressure
0.01, , , , 0.05, , ,
*Controls, parameters=field, field=rotation
0.01, , , , 0.05, , ,
*Controls, parameters=field, field=electrical potential
0.01, , , , 0.05, , ,
**
** OUTPUT REQUESTS
**
*Restart, write, frequency=0
**
** FIELD OUTPUT: F-Output-1
**
*Output, field
*Node Output
RF, U
**
** HISTORY OUTPUT: H-Output-1
**
*Output, history, variable=PRESELECT
*End Step
