*Heading
** Job name: Patch1 Model name: Patch1
** Generated by: Abaqus/CAE 6.11-1
*Preprint, echo=NO, model=NO, history=NO, contact=NO
**
*Part, name=fnm
*NODE,INPUT=uel_nodes.inp
*USER ELEMENT, TYPE=U308, NODES=56, COORDINATES=3, PROPERTIES=1, VARIABLES=1
1,2,3
*ELEMENT, TYPE=U308, ELSET=fnm, INPUT=uel_elems.inp
*UEL PROPERTY, ELSET=fnm
1
*Nset, nset=BOTTOM
1,2,5,6,25,26,29,30
*Nset, nset=TOP
3,4,7,8,27,28,31,32
*Nset, nset=FRONT
29,30,31,32
*End Part
*Assembly, name=Assembly
**
*Instance, name=fnm-1, part=fnm
*End Instance
**
*End Assembly
*Boundary
fnm-1.BOTTOM, 2, 2
fnm-1.BOTTOM, 1, 1
fnm-1.TOP, 1, 1
fnm-1.FRONT, 3, 3
*Step, name=tension, inc=1000
*Static
0.0002, 0.1, 1e-07, 0.0002
**
** BOUNDARY CONDITIONS
**
** Name: Vel-BC-1 Type: Velocity/Angular velocity
*Boundary, type=VELOCITY
fnm-1.TOP, 2, 2, 1.
**
** CONTROLS
**
*Controls, reset
*Controls, parameters=time incrementation
1600, 2000, , 3000, 2400, 50, , 125, , ,
**
*Controls, reset
*Controls, parameters=time incrementation
3200, 4000, , 6000, 4800, 50, , 125, , ,
**
** OUTPUT REQUESTS
**
*Restart, write, frequency=0
**
** FIELD OUTPUT: F-Output-1
**
*Output, field, variable=PRESELECT
**
** HISTORY OUTPUT: H-Output-1
**
*Output, history, variable=PRESELECT
*End Step
